# OpenSim document version 40600
Model:
  Ground
  BodySet:
    Body pelvis: mass=11.777 [kg] mass_center=(0 0 0) inertia=(0.1028 0.0871 0.0579 0 0 0)
      PhysicalOffsetFrame pelvis_offset: socket_parent=.. translation=(-0.01 -0.05 0) [meters]
        Ellipsoid pelvis_offset_geom_1: radii=(0.07 0.07 0.12)
      ContactEllipsoid glut_max_r_obstacle: location=(-0.04 -0.085 0.09) orientation=(-0.2 0.5 0) radii=(0.04 0.04 0.1)
      ContactEllipsoid glut_max_l_obstacle: location=(-0.04 -0.085 -0.09) orientation=(0.2 -0.5 0)
          radii=(0.04 0.04 0.1)
    Body torso: mass=34.2366 mass_center=(0 0 0) inertia=(1.4745 0.7555 1.4314 0 0 0)
      PhysicalOffsetFrame torso_offset: socket_parent=.. translation=(0 0.38 0)
        Sphere torso_offset_geom_1: radius=0.09
      Ellipsoid torso_geom_1: radii=(0.1 0.27 0.1)
    Body leftThigh: mass=9.3014 mass_center=(0 0 0) inertia=(0.1339 0.0351 0.1412 0 0 0)
      Ellipsoid leftThigh_geom_1: radii=(0.04 0.2 0.04)
    Body leftShank: mass=3.7075 mass_center=(0 0 0) inertia=(0.0504 0.0051 0.0511 0 0 0)
      ContactEllipsoid gastroc_l_obstacle: location=(-0.00861 0.05 0) orientation=(-2.9672 0.028 1.478)
          radii=(0.065 0.065 0.2)
      Cylinder leftShank_geom_1: radius=0.02 half_height=0.22
    Body leftFoot: mass=1.25 mass_center=(0 0 0) inertia=(0.0014 0.0039 0.0041 0 0 0)
      PhysicalOffsetFrame heel_geometry: socket_parent=.. translation=(-0.085 -0.015 0.005)
        Sphere heel_geometry_geom_1: radius=0.01
      PhysicalOffsetFrame lateralToe_geometry: socket_parent=.. translation=(0.0425 -0.03 -0.041)
        Sphere lateralToe_geometry_geom_1: radius=0.01
      PhysicalOffsetFrame medialToe_geometry: socket_parent=.. translation=(0.085 -0.03 0.0275)
        Sphere medialToe_geometry_geom_1: radius=0.01
      Ellipsoid leftFoot_geom_1: radii=(0.1 0.03 0.05)
    Body rightThigh: mass=9.3014 mass_center=(0 0 0) inertia=(0.1339 0.0351 0.1412 0 0 0)
      Ellipsoid rightThigh_geom_1: radii=(0.04 0.2 0.04)
    Body rightShank: mass=3.7075 mass_center=(0 0 0) inertia=(0.0504 0.0051 0.0511 0 0 0)
      ContactEllipsoid gastroc_r_obstacle: location=(-0.00861 0.05 0) orientation=(2.9672 0.028 -1.478)
          radii=(0.065 0.065 0.2)
      Cylinder rightShank_geom_1: radius=0.02 half_height=0.22
    Body rightFoot: mass=1.25 mass_center=(0 0 0) inertia=(0.0014 0.0039 0.0041 0 0 0)
      PhysicalOffsetFrame heel_geometry: socket_parent=.. translation=(-0.085 -0.015 -0.005)
        Sphere heel_geometry_geom_1: radius=0.01
      PhysicalOffsetFrame lateralToe_geometry: socket_parent=.. translation=(0.0425 -0.03 0.041)
        Sphere lateralToe_geometry_geom_1: radius=0.01
      PhysicalOffsetFrame medialToe_geometry: socket_parent=.. translation=(0.085 -0.03 -0.0275)
        Sphere medialToe_geometry_geom_1: radius=0.01
      Ellipsoid rightFoot_geom_1: radii=(0.1 0.03 0.05)
  JointSet:
    FreeJoint pelvis_ground: socket_parent_frame=/ground socket_child_frame=/bodyset/pelvis
      Coordinate pelvis_ground_coord_0
      Coordinate pelvis_ground_coord_1
      Coordinate pelvis_ground_coord_2
      Coordinate pelvis_ground_coord_3
      Coordinate pelvis_ground_coord_4: default_value=1.05
      Coordinate pelvis_ground_coord_5
    CustomJoint lumbar: socket_parent_frame=pelvis_offset socket_child_frame=torso_offset
      Coordinate lumbar_coord_0
      Coordinate lumbar_coord_1
      Coordinate lumbar_coord_2
      PhysicalOffsetFrame pelvis_offset: socket_parent=/bodyset/pelvis translation=(0 0.05 0)
      PhysicalOffsetFrame torso_offset: socket_parent=/bodyset/torso translation=(0 -0.25 0)
      SpatialTransform:
        TransformAxis rotation1: coordinates=lumbar_coord_0 axis=(1 0 0) LinearFunction(coefficients=1 0)
        TransformAxis rotation2: coordinates=lumbar_coord_1 axis=(0 1 0) LinearFunction(coefficients=1 0)
        TransformAxis rotation3: coordinates=lumbar_coord_2 axis=(0 0 1) LinearFunction(coefficients=1 0)
        TransformAxis translation1: axis=(1 0 0)
        TransformAxis translation2: axis=(0 1 0)
        TransformAxis translation3: axis=(0 0 1)
    CustomJoint hip_l: socket_parent_frame=pelvis_offset socket_child_frame=leftThigh_offset
      Coordinate hip_l_coord_0
      Coordinate hip_l_coord_1
      Coordinate hip_l_coord_2
      PhysicalOffsetFrame pelvis_offset: socket_parent=/bodyset/pelvis translation=(0 -0.0661 -0.0835)
      PhysicalOffsetFrame leftThigh_offset: socket_parent=/bodyset/leftThigh translation=(0 0.17 0)
      SpatialTransform:
        TransformAxis rotation1: coordinates=hip_l_coord_0 axis=(1 0 0) LinearFunction(coefficients=1 0)
        TransformAxis rotation2: coordinates=hip_l_coord_1 axis=(0 1 0) LinearFunction(coefficients=1 0)
        TransformAxis rotation3: coordinates=hip_l_coord_2 axis=(0 0 1) LinearFunction(coefficients=1 0)
        TransformAxis translation1: axis=(1 0 0)
        TransformAxis translation2: axis=(0 1 0)
        TransformAxis translation3: axis=(0 0 1)
    PinJoint knee_l: socket_parent_frame=leftThigh_offset socket_child_frame=leftShank_offset
      Coordinate knee_l_coord_0
      PhysicalOffsetFrame leftThigh_offset: socket_parent=/bodyset/leftThigh translation=(0 -0.226 0)
      PhysicalOffsetFrame leftShank_offset: socket_parent=/bodyset/leftShank translation=(0 0.1867 0)
    PinJoint ankle_l: socket_parent_frame=leftShank_offset socket_child_frame=leftFoot_offset
      Coordinate ankle_l_coord_0
      PhysicalOffsetFrame leftShank_offset: socket_parent=/bodyset/leftShank translation=(0 -0.2433 0)
      PhysicalOffsetFrame leftFoot_offset: socket_parent=/bodyset/leftFoot translation=(-0.05123 0.01195 0.00792)
    CustomJoint hip_r: socket_parent_frame=pelvis_offset socket_child_frame=rightThigh_offset
      Coordinate hip_r_coord_0
      Coordinate hip_r_coord_1
      Coordinate hip_r_coord_2
      PhysicalOffsetFrame pelvis_offset: socket_parent=/bodyset/pelvis translation=(0 -0.0661 0.0835)
      PhysicalOffsetFrame rightThigh_offset: socket_parent=/bodyset/rightThigh translation=(0 0.17 0)
      SpatialTransform:
        TransformAxis rotation1: coordinates=hip_r_coord_0 axis=(1 0 0) LinearFunction(coefficients=1 0)
        TransformAxis rotation2: coordinates=hip_r_coord_1 axis=(0 1 0) LinearFunction(coefficients=1 0)
        TransformAxis rotation3: coordinates=hip_r_coord_2 axis=(0 0 1) LinearFunction(coefficients=1 0)
        TransformAxis translation1: axis=(1 0 0)
        TransformAxis translation2: axis=(0 1 0)
        TransformAxis translation3: axis=(0 0 1)
    PinJoint knee_r: socket_parent_frame=rightThigh_offset socket_child_frame=rightShank_offset
      Coordinate knee_r_coord_0
      PhysicalOffsetFrame rightThigh_offset: socket_parent=/bodyset/rightThigh translation=(0 -0.226 0)
      PhysicalOffsetFrame rightShank_offset: socket_parent=/bodyset/rightShank translation=(0 0.1867 0)
    PinJoint ankle_r: socket_parent_frame=rightShank_offset socket_child_frame=rightFoot_offset
      Coordinate ankle_r_coord_0
      PhysicalOffsetFrame rightShank_offset: socket_parent=/bodyset/rightShank translation=(0 -0.2433 0)
      PhysicalOffsetFrame rightFoot_offset: socket_parent=/bodyset/rightFoot translation=(-0.05123 0.01195 -0.00792)
  ForceSet:
    Millard2012EquilibriumMuscle [values shared by the 22 below unless stated]: min_control=0.01 max_control=1
        ignore_tendon_compliance=true default_activation=0.01
      ActiveForceLengthCurve: minimum_value=0
      ForceVelocityCurve: concentric_slope_at_vmax=0 concentric_slope_near_vmax=0.25 isometric_slope=5
          eccentric_slope_at_vmax=0 eccentric_slope_near_vmax=0.15 max_eccentric_velocity_force_multiplier=1.4
      FiberForceLengthCurve
      TendonForceLengthCurve
    Millard2012EquilibriumMuscle glut_med_r: max_isometric_force=2045 optimal_fiber_length=0.0733
        tendon_slack_length=0.066 pennation_angle_at_optimal=0.3578 [radians]
      Scholz2015GeometryPath path:
        Station origin: pelvis (-0.0148 0.0445 0.0766)
        Station insertion: rightThigh (-0.0258 0.1642 0.0527)
        segments: Scholz2015GeometryPathSegment path_segment_0: socket_origin=/forceset/glut_med_r/path/origin
            socket_insertion=/forceset/glut_med_r/path/insertion
    Millard2012EquilibriumMuscle add_mag_r: max_isometric_force=2268 optimal_fiber_length=0.087
        tendon_slack_length=0.06 pennation_angle_at_optimal=0.0872665
      Scholz2015GeometryPath path:
        Station origin: pelvis (-0.0025 -0.1174 0.0255)
        Station insertion: rightThigh (-0.0045 0.0489 0.0339)
        segments: Scholz2015GeometryPathSegment path_segment_0: socket_origin=/forceset/add_mag_r/path/origin
            socket_insertion=/forceset/add_mag_r/path/insertion
    Millard2012EquilibriumMuscle hamstrings_r: max_isometric_force=2594 optimal_fiber_length=0.0976
        tendon_slack_length=0.319 pennation_angle_at_optimal=0.2025
      Scholz2015GeometryPath path:
        Station origin: pelvis (-0.05526 -0.10257 0.06944)
        Station insertion: rightShank (-0.021 0.1467 0.0343)
        via_points: Station via_point_0: rightShank (-0.028 0.1667 0.02943)
        segments:
          Scholz2015GeometryPathSegment path_segment_0: socket_origin=/forceset/hamstrings_r/path/origin
              socket_insertion=/forceset/hamstrings_r/path/via_point_0
          Scholz2015GeometryPathSegment path_segment_1: socket_origin=/forceset/hamstrings_r/path/via_point_0
              socket_insertion=/forceset/hamstrings_r/path/insertion
    Millard2012EquilibriumMuscle bifemsh_r: max_isometric_force=804 optimal_fiber_length=0.1103
        tendon_slack_length=0.095 pennation_angle_at_optimal=0.2147
      Scholz2015GeometryPath path:
        Station origin: rightThigh (0.005 -0.0411 0.0234)
        Station insertion: rightShank (-0.021 0.1467 0.0343)
        via_points: Station via_point_0: rightShank (-0.028 0.1667 0.02943)
        segments:
          Scholz2015GeometryPathSegment path_segment_0: socket_origin=/forceset/bifemsh_r/path/origin
              socket_insertion=/forceset/bifemsh_r/path/via_point_0
          Scholz2015GeometryPathSegment path_segment_1: socket_origin=/forceset/bifemsh_r/path/via_point_0
              socket_insertion=/forceset/bifemsh_r/path/insertion
    Millard2012EquilibriumMuscle glut_max_r: max_isometric_force=1944 optimal_fiber_length=0.1569
        tendon_slack_length=0.111 pennation_angle_at_optimal=0.3822
      Scholz2015GeometryPath path:
        Station origin: pelvis (-0.0642 0.0176 0.0563)
        Station insertion: rightThigh (-0.0156 0.0684 0.0419)
        segments: Scholz2015GeometryPathSegment path_segment_0: socket_origin=/forceset/glut_max_r/path/origin
            socket_insertion=/forceset/glut_max_r/path/insertion
          obstacles: Scholz2015GeometryPathObstacle path_obstacle_0: socket_contact_geometry=/bodyset/pelvis/glut_max_r_obstacle
              contact_hint=(-0.04 0 0)
    Millard2012EquilibriumMuscle iliopsoas_r: max_isometric_force=2186 optimal_fiber_length=0.1066
        tendon_slack_length=0.152 pennation_angle_at_optimal=0.2496
      Scholz2015GeometryPath path:
        Station origin: pelvis (0.006 0.0887 0.0289)
        Station insertion: rightThigh (-0.0188 0.1103 0.0104)
        via_points:
          Station via_point_0: pelvis (0.0407 -0.01 0.076)
          Station via_point_1: rightThigh (0.033 0.135 0.0038)
        segments:
          Scholz2015GeometryPathSegment path_segment_0: socket_origin=/forceset/iliopsoas_r/path/origin
              socket_insertion=/forceset/iliopsoas_r/path/via_point_0
          Scholz2015GeometryPathSegment path_segment_1: socket_origin=/forceset/iliopsoas_r/path/via_point_0
              socket_insertion=/forceset/iliopsoas_r/path/via_point_1
          Scholz2015GeometryPathSegment path_segment_2: socket_origin=/forceset/iliopsoas_r/path/via_point_1
              socket_insertion=/forceset/iliopsoas_r/path/insertion
    Millard2012EquilibriumMuscle rect_fem_r: max_isometric_force=1169 optimal_fiber_length=0.0759
        tendon_slack_length=0.3449 pennation_angle_at_optimal=0.2426
      Scholz2015GeometryPath path:
        Station origin: pelvis (0.0412 -0.0311 0.0968)
        Station insertion: rightShank (0.038 0.2117 0.0018)
        via_points: Station via_point_0: rightThigh (0.038 -0.17 0.004)
        segments:
          Scholz2015GeometryPathSegment path_segment_0: socket_origin=/forceset/rect_fem_r/path/origin
              socket_insertion=/forceset/rect_fem_r/path/via_point_0
          Scholz2015GeometryPathSegment path_segment_1: socket_origin=/forceset/rect_fem_r/path/via_point_0
              socket_insertion=/forceset/rect_fem_r/path/insertion
    Millard2012EquilibriumMuscle vasti_r: max_isometric_force=4530 optimal_fiber_length=0.0993
        tendon_slack_length=0.1231 pennation_angle_at_optimal=0.0785
      Scholz2015GeometryPath path:
        Station origin: rightThigh (0.029 -0.0224 0.031)
        Station insertion: rightShank (0.038 0.2117 0.0018)
        via_points: Station via_point_0: rightThigh (0.038 -0.17 0.007)
        segments:
          Scholz2015GeometryPathSegment path_segment_0: socket_origin=/forceset/vasti_r/path/origin
              socket_insertion=/forceset/vasti_r/path/via_point_0
          Scholz2015GeometryPathSegment path_segment_1: socket_origin=/forceset/vasti_r/path/via_point_0
              socket_insertion=/forceset/vasti_r/path/insertion
    Millard2012EquilibriumMuscle gastroc_r: max_isometric_force=2241 optimal_fiber_length=0.051
        tendon_slack_length=0.384 pennation_angle_at_optimal=0.1728
      Scholz2015GeometryPath path:
        Station origin: rightThigh (-0.02 -0.218 -0.024)
        Station insertion: rightFoot (-0.095 0.001 -0.0053)
        segments: Scholz2015GeometryPathSegment path_segment_0: socket_origin=/forceset/gastroc_r/path/origin
            socket_insertion=/forceset/gastroc_r/path/insertion
          obstacles: Scholz2015GeometryPathObstacle path_obstacle_0: socket_contact_geometry=/bodyset/rightShank/gastroc_r_obstacle
              contact_hint=(0 -0.065 0)
    Millard2012EquilibriumMuscle soleus_r: max_isometric_force=3549 optimal_fiber_length=0.044
        tendon_slack_length=0.248 pennation_angle_at_optimal=0.4939
      Scholz2015GeometryPath path:
        Station origin: rightShank (-0.0024 0.0334 0.0071)
        Station insertion: rightFoot (-0.095 0.001 -0.0053)
        segments: Scholz2015GeometryPathSegment path_segment_0: socket_origin=/forceset/soleus_r/path/origin
            socket_insertion=/forceset/soleus_r/path/insertion
    Millard2012EquilibriumMuscle tib_ant_r: max_isometric_force=1579 optimal_fiber_length=0.0683
        tendon_slack_length=0.243 pennation_angle_at_optimal=0.1676
      Scholz2015GeometryPath path:
        Station origin: rightShank (0.0179 0.0243 0.0115)
        Station insertion: rightFoot (0.0166 -0.0122 -0.0305)
        via_points: Station via_point_0: rightShank (0.0329 -0.2084 -0.0177)
        segments:
          Scholz2015GeometryPathSegment path_segment_0: socket_origin=/forceset/tib_ant_r/path/origin
              socket_insertion=/forceset/tib_ant_r/path/via_point_0
          Scholz2015GeometryPathSegment path_segment_1: socket_origin=/forceset/tib_ant_r/path/via_point_0
              socket_insertion=/forceset/tib_ant_r/path/insertion
    Millard2012EquilibriumMuscle glut_med_l: max_isometric_force=2045 optimal_fiber_length=0.0733
        tendon_slack_length=0.066 pennation_angle_at_optimal=0.3578
      Scholz2015GeometryPath path:
        Station origin: pelvis (-0.0148 0.0445 -0.0766)
        Station insertion: leftThigh (-0.0258 0.1642 -0.0527)
        segments: Scholz2015GeometryPathSegment path_segment_0: socket_origin=/forceset/glut_med_l/path/origin
            socket_insertion=/forceset/glut_med_l/path/insertion
    Millard2012EquilibriumMuscle add_mag_l: max_isometric_force=2268 optimal_fiber_length=0.087
        tendon_slack_length=0.06 pennation_angle_at_optimal=0.0872665
      Scholz2015GeometryPath path:
        Station origin: pelvis (-0.0025 -0.1174 -0.0255)
        Station insertion: leftThigh (-0.0045 0.0489 -0.0339)
        segments: Scholz2015GeometryPathSegment path_segment_0: socket_origin=/forceset/add_mag_l/path/origin
            socket_insertion=/forceset/add_mag_l/path/insertion
    Millard2012EquilibriumMuscle hamstrings_l: max_isometric_force=2594 optimal_fiber_length=0.0976
        tendon_slack_length=0.319 pennation_angle_at_optimal=0.2025
      Scholz2015GeometryPath path:
        Station origin: pelvis (-0.05526 -0.10257 -0.06944)
        Station insertion: leftShank (-0.021 0.1467 -0.0343)
        via_points: Station via_point_0: leftShank (-0.028 0.1667 -0.02943)
        segments:
          Scholz2015GeometryPathSegment path_segment_0: socket_origin=/forceset/hamstrings_l/path/origin
              socket_insertion=/forceset/hamstrings_l/path/via_point_0
          Scholz2015GeometryPathSegment path_segment_1: socket_origin=/forceset/hamstrings_l/path/via_point_0
              socket_insertion=/forceset/hamstrings_l/path/insertion
    Millard2012EquilibriumMuscle bifemsh_l: max_isometric_force=804 optimal_fiber_length=0.1103
        tendon_slack_length=0.095 pennation_angle_at_optimal=0.2147
      Scholz2015GeometryPath path:
        Station origin: leftThigh (0.005 -0.0411 -0.0234)
        Station insertion: leftShank (-0.021 0.1467 -0.0343)
        via_points: Station via_point_0: leftShank (-0.028 0.1667 -0.02943)
        segments:
          Scholz2015GeometryPathSegment path_segment_0: socket_origin=/forceset/bifemsh_l/path/origin
              socket_insertion=/forceset/bifemsh_l/path/via_point_0
          Scholz2015GeometryPathSegment path_segment_1: socket_origin=/forceset/bifemsh_l/path/via_point_0
              socket_insertion=/forceset/bifemsh_l/path/insertion
    Millard2012EquilibriumMuscle glut_max_l: max_isometric_force=1944 optimal_fiber_length=0.1569
        tendon_slack_length=0.111 pennation_angle_at_optimal=0.3822
      Scholz2015GeometryPath path:
        Station origin: pelvis (-0.0642 0.0176 -0.0563)
        Station insertion: leftThigh (-0.0156 0.0684 -0.0419)
        segments: Scholz2015GeometryPathSegment path_segment_0: socket_origin=/forceset/glut_max_l/path/origin
            socket_insertion=/forceset/glut_max_l/path/insertion
          obstacles: Scholz2015GeometryPathObstacle path_obstacle_0: socket_contact_geometry=/bodyset/pelvis/glut_max_l_obstacle
              contact_hint=(-0.04 0 0)
    Millard2012EquilibriumMuscle iliopsoas_l: max_isometric_force=2186 optimal_fiber_length=0.1066
        tendon_slack_length=0.152 pennation_angle_at_optimal=0.2496
      Scholz2015GeometryPath path:
        Station origin: pelvis (0.006 0.0887 -0.0289)
        Station insertion: leftThigh (-0.0188 0.1103 -0.0104)
        via_points:
          Station via_point_0: pelvis (0.0407 -0.01 -0.076)
          Station via_point_1: leftThigh (0.033 0.135 -0.0038)
        segments:
          Scholz2015GeometryPathSegment path_segment_0: socket_origin=/forceset/iliopsoas_l/path/origin
              socket_insertion=/forceset/iliopsoas_l/path/via_point_0
          Scholz2015GeometryPathSegment path_segment_1: socket_origin=/forceset/iliopsoas_l/path/via_point_0
              socket_insertion=/forceset/iliopsoas_l/path/via_point_1
          Scholz2015GeometryPathSegment path_segment_2: socket_origin=/forceset/iliopsoas_l/path/via_point_1
              socket_insertion=/forceset/iliopsoas_l/path/insertion
    Millard2012EquilibriumMuscle rect_fem_l: max_isometric_force=1169 optimal_fiber_length=0.0759
        tendon_slack_length=0.3449 pennation_angle_at_optimal=0.2426
      Scholz2015GeometryPath path:
        Station origin: pelvis (0.0412 -0.0311 -0.0968)
        Station insertion: leftShank (0.038 0.2117 -0.0018)
        via_points: Station via_point_0: leftThigh (0.038 -0.17 -0.004)
        segments:
          Scholz2015GeometryPathSegment path_segment_0: socket_origin=/forceset/rect_fem_l/path/origin
              socket_insertion=/forceset/rect_fem_l/path/via_point_0
          Scholz2015GeometryPathSegment path_segment_1: socket_origin=/forceset/rect_fem_l/path/via_point_0
              socket_insertion=/forceset/rect_fem_l/path/insertion
    Millard2012EquilibriumMuscle vasti_l: max_isometric_force=4530 optimal_fiber_length=0.0993
        tendon_slack_length=0.1231 pennation_angle_at_optimal=0.0785
      Scholz2015GeometryPath path:
        Station origin: leftThigh (0.029 -0.0224 -0.031)
        Station insertion: leftShank (0.038 0.2117 -0.0018)
        via_points: Station via_point_0: leftThigh (0.038 -0.17 -0.007)
        segments:
          Scholz2015GeometryPathSegment path_segment_0: socket_origin=/forceset/vasti_l/path/origin
              socket_insertion=/forceset/vasti_l/path/via_point_0
          Scholz2015GeometryPathSegment path_segment_1: socket_origin=/forceset/vasti_l/path/via_point_0
              socket_insertion=/forceset/vasti_l/path/insertion
    Millard2012EquilibriumMuscle gastroc_l: max_isometric_force=2241 optimal_fiber_length=0.051
        tendon_slack_length=0.384 pennation_angle_at_optimal=0.1728
      Scholz2015GeometryPath path:
        Station origin: leftThigh (-0.02 -0.218 0.024)
        Station insertion: leftFoot (-0.095 0.001 0.0053)
        segments: Scholz2015GeometryPathSegment path_segment_0: socket_origin=/forceset/gastroc_l/path/origin
            socket_insertion=/forceset/gastroc_l/path/insertion
          obstacles: Scholz2015GeometryPathObstacle path_obstacle_0: socket_contact_geometry=/bodyset/leftShank/gastroc_l_obstacle
              contact_hint=(-0.065 0 0)
    Millard2012EquilibriumMuscle soleus_l: max_isometric_force=3549 optimal_fiber_length=0.044
        tendon_slack_length=0.248 pennation_angle_at_optimal=0.4939
      Scholz2015GeometryPath path:
        Station origin: leftShank (-0.0024 0.0334 -0.0071)
        Station insertion: leftFoot (-0.095 0.001 0.0053)
        segments: Scholz2015GeometryPathSegment path_segment_0: socket_origin=/forceset/soleus_l/path/origin
            socket_insertion=/forceset/soleus_l/path/insertion
    Millard2012EquilibriumMuscle tib_ant_l: max_isometric_force=1579 optimal_fiber_length=0.0683
        tendon_slack_length=0.243 pennation_angle_at_optimal=0.1676
      Scholz2015GeometryPath path:
        Station origin: leftShank (0.0179 0.0243 -0.0115)
        Station insertion: leftFoot (0.0166 -0.0122 -0.0305)
        via_points: Station via_point_0: leftShank (0.0329 -0.2084 -0.0177)
        segments:
          Scholz2015GeometryPathSegment path_segment_0: socket_origin=/forceset/tib_ant_l/path/origin
              socket_insertion=/forceset/tib_ant_l/path/via_point_0
          Scholz2015GeometryPathSegment path_segment_1: socket_origin=/forceset/tib_ant_l/path/via_point_0
              socket_insertion=/forceset/tib_ant_l/path/insertion
    ActivationCoordinateActuator lumbar_coord_0_torque: min_control=-1 max_control=1 coordinate=lumbar_coord_0
        optimal_force=100 activation_time_constant=0.05
    ActivationCoordinateActuator lumbar_coord_1_torque: min_control=-1 max_control=1 coordinate=lumbar_coord_1
        optimal_force=100 activation_time_constant=0.05
    ActivationCoordinateActuator lumbar_coord_2_torque: min_control=-1 max_control=1 coordinate=lumbar_coord_2
        optimal_force=100 activation_time_constant=0.05
    CoordinateLinearDamper lumbar_coord_0_damper: coordinate=lumbar_coord_0 damping=1
    CoordinateLinearDamper lumbar_coord_1_damper: coordinate=lumbar_coord_1 damping=1
    CoordinateLinearDamper lumbar_coord_2_damper: coordinate=lumbar_coord_2 damping=1
    CoordinateLinearDamper hip_l_coord_0_damper: coordinate=hip_l_coord_0 damping=1
    CoordinateLinearDamper hip_l_coord_1_damper: coordinate=hip_l_coord_1 damping=1
    CoordinateLinearDamper hip_l_coord_2_damper: coordinate=hip_l_coord_2 damping=1
    CoordinateLinearDamper hip_r_coord_0_damper: coordinate=hip_r_coord_0 damping=1
    CoordinateLinearDamper hip_r_coord_1_damper: coordinate=hip_r_coord_1 damping=1
    CoordinateLinearDamper hip_r_coord_2_damper: coordinate=hip_r_coord_2 damping=1
    CoordinateLinearDamper knee_l_coord_0_damper: coordinate=knee_l_coord_0 damping=1
    CoordinateLinearDamper ankle_l_coord_0_damper: coordinate=ankle_l_coord_0 damping=1
    CoordinateLinearDamper knee_r_coord_0_damper: coordinate=knee_r_coord_0 damping=1
    CoordinateLinearDamper ankle_r_coord_0_damper: coordinate=ankle_r_coord_0 damping=1
    CoordinateLinearStop lumbar_coord_0_stop: coordinate=lumbar_coord_0 stiffness=500 [N-m/rad] damping=2.95953
        q_high=0.3490659 [rad] q_low=-0.3490659 [rad]
    CoordinateLinearStop lumbar_coord_1_stop: coordinate=lumbar_coord_1 stiffness=500 damping=2.95953 q_high=0.3490659
        q_low=-0.3490659
    CoordinateLinearStop lumbar_coord_2_stop: coordinate=lumbar_coord_2 stiffness=500 damping=2.95953 q_high=0.3490659
        q_low=-0.3490659
    CoordinateLinearStop hip_l_coord_0_stop: coordinate=hip_l_coord_0 stiffness=500 damping=2.95953 q_high=0.5235988
        q_low=-0.5235988
    CoordinateLinearStop hip_l_coord_1_stop: coordinate=hip_l_coord_1 stiffness=500 damping=2.95953 q_high=0.5235988
        q_low=-0.5235988
    CoordinateLinearStop hip_l_coord_2_stop: coordinate=hip_l_coord_2 stiffness=500 damping=2.95953 q_high=0.5235988
        q_low=-0.5235988
    CoordinateLinearStop hip_r_coord_0_stop: coordinate=hip_r_coord_0 stiffness=500 damping=2.95953 q_high=0.5235988
        q_low=-0.5235988
    CoordinateLinearStop hip_r_coord_1_stop: coordinate=hip_r_coord_1 stiffness=500 damping=2.95953 q_high=0.5235988
        q_low=-0.5235988
    CoordinateLinearStop hip_r_coord_2_stop: coordinate=hip_r_coord_2 stiffness=500 damping=2.95953 q_high=0.5235988
        q_low=-0.5235988
    CoordinateLinearStop knee_l_coord_0_stop: coordinate=knee_l_coord_0 stiffness=500 damping=2.95953
        q_high=-0.05235988 q_low=-2.094395
    CoordinateLinearStop knee_r_coord_0_stop: coordinate=knee_r_coord_0 stiffness=500 damping=2.95953
        q_high=-0.05235988 q_low=-2.094395
    CoordinateLinearStop ankle_l_coord_0_stop: coordinate=ankle_l_coord_0 stiffness=500 damping=2.95953
        q_high=0.4363323 q_low=-1.047198
    CoordinateLinearStop ankle_r_coord_0_stop: coordinate=ankle_r_coord_0 stiffness=500 damping=2.95953
        q_high=0.4363323 q_low=-1.047198
    ExponentialContactForce [values shared by the 38 below unless stated]: contact_plane_transform=(-1.570796 0 0 0 0 0)
    ExponentialContactForce left_heel_contact:
      Parameters contact_parameters: exponential_shape_parameters=(0.0065905 0.5336 1150) normal_viscosity=1
          max_normal_force=100000 friction_elasticity=20000 friction_viscosity=282.8427 settle_velocity=0.1
          initial_mu_static=0.9 initial_mu_kinetic=0.6
      Station: leftFoot (-0.085 -0.015 0.005)
    ExponentialContactForce left_lateralToe_contact:
      Parameters contact_parameters: exponential_shape_parameters=(0.0065905 0.5336 1150) normal_viscosity=1
          max_normal_force=100000 friction_elasticity=20000 friction_viscosity=282.8427 settle_velocity=0.1
          initial_mu_static=0.9 initial_mu_kinetic=0.6
      Station: leftFoot (0.0425 -0.03 -0.041)
    ExponentialContactForce left_medialToe_contact:
      Parameters contact_parameters: exponential_shape_parameters=(0.0065905 0.5336 1150) normal_viscosity=1
          max_normal_force=100000 friction_elasticity=20000 friction_viscosity=282.8427 settle_velocity=0.1
          initial_mu_static=0.9 initial_mu_kinetic=0.6
      Station: leftFoot (0.085 -0.03 0.0275)
    ExponentialContactForce right_heel_contact:
      Parameters contact_parameters: exponential_shape_parameters=(0.0065905 0.5336 1150) normal_viscosity=1
          max_normal_force=100000 friction_elasticity=20000 friction_viscosity=282.8427 settle_velocity=0.1
          initial_mu_static=0.9 initial_mu_kinetic=0.6
      Station: rightFoot (-0.085 -0.015 -0.005)
    ExponentialContactForce right_lateralToe_contact:
      Parameters contact_parameters: exponential_shape_parameters=(0.0065905 0.5336 1150) normal_viscosity=1
          max_normal_force=100000 friction_elasticity=20000 friction_viscosity=282.8427 settle_velocity=0.1
          initial_mu_static=0.9 initial_mu_kinetic=0.6
      Station: rightFoot (0.0425 -0.03 0.041)
    ExponentialContactForce right_medialToe_contact:
      Parameters contact_parameters: exponential_shape_parameters=(0.0065905 0.5336 1150) normal_viscosity=1
          max_normal_force=100000 friction_elasticity=20000 friction_viscosity=282.8427 settle_velocity=0.1
          initial_mu_static=0.9 initial_mu_kinetic=0.6
      Station: rightFoot (0.085 -0.03 -0.0275)
    ExponentialContactForce torso_front_contact:
      Parameters contact_parameters: exponential_shape_parameters=(0.0065905 0.5336 1150) normal_viscosity=1
          max_normal_force=100000 friction_elasticity=20000 friction_viscosity=282.8427 settle_velocity=0.1
          initial_mu_static=0.9 initial_mu_kinetic=0.6
      Station: torso (0 0.1 0)
    ExponentialContactForce torso_back_contacpt:
      Parameters contact_parameters: exponential_shape_parameters=(0.0065905 0.5336 1150) normal_viscosity=1
          max_normal_force=100000 friction_elasticity=20000 friction_viscosity=282.8427 settle_velocity=0.1
          initial_mu_static=0.9 initial_mu_kinetic=0.6
      Station: torso (0 -0.1 0)
    ExponentialContactForce torso_left_contact:
      Parameters contact_parameters: exponential_shape_parameters=(0.0065905 0.5336 1150) normal_viscosity=1
          max_normal_force=100000 friction_elasticity=20000 friction_viscosity=282.8427 settle_velocity=0.1
          initial_mu_static=0.9 initial_mu_kinetic=0.6
      Station: torso (0 0 0.05)
    ExponentialContactForce torso_right_contact:
      Parameters contact_parameters: exponential_shape_parameters=(0.0065905 0.5336 1150) normal_viscosity=1
          max_normal_force=100000 friction_elasticity=20000 friction_viscosity=282.8427 settle_velocity=0.1
          initial_mu_static=0.9 initial_mu_kinetic=0.6
      Station: torso (0 0 -0.05)
    ExponentialContactForce pelvis_front_contact:
      Parameters contact_parameters: exponential_shape_parameters=(0.0065905 0.5336 1150) normal_viscosity=1
          max_normal_force=100000 friction_elasticity=20000 friction_viscosity=282.8427 settle_velocity=0.1
          initial_mu_static=0.9 initial_mu_kinetic=0.6
      Station: pelvis (0 0.05 0)
    ExponentialContactForce pelvis_back_contact:
      Parameters contact_parameters: exponential_shape_parameters=(0.0065905 0.5336 1150) normal_viscosity=1
          max_normal_force=100000 friction_elasticity=20000 friction_viscosity=282.8427 settle_velocity=0.1
          initial_mu_static=0.9 initial_mu_kinetic=0.6
      Station: pelvis (0 -0.05 0)
    ExponentialContactForce pelvis_left_contact:
      Parameters contact_parameters: exponential_shape_parameters=(0.0065905 0.5336 1150) normal_viscosity=1
          max_normal_force=100000 friction_elasticity=20000 friction_viscosity=282.8427 settle_velocity=0.1
          initial_mu_static=0.9 initial_mu_kinetic=0.6
      Station: pelvis (0 0 0.06)
    ExponentialContactForce pelvis_right_contact:
      Parameters contact_parameters: exponential_shape_parameters=(0.0065905 0.5336 1150) normal_viscosity=1
          max_normal_force=100000 friction_elasticity=20000 friction_viscosity=282.8427 settle_velocity=0.1
          initial_mu_static=0.9 initial_mu_kinetic=0.6
      Station: pelvis (0 0 -0.06)
    ExponentialContactForce left_hip_front_contact:
      Parameters contact_parameters: exponential_shape_parameters=(0.0065905 0.5336 1150) normal_viscosity=1
          max_normal_force=100000 friction_elasticity=20000 friction_viscosity=282.8427 settle_velocity=0.1
          initial_mu_static=0.9 initial_mu_kinetic=0.6
      Station: leftThigh (0 0.15 0)
    ExponentialContactForce left_hip_back_contact:
      Parameters contact_parameters: exponential_shape_parameters=(0.0065905 0.5336 1150) normal_viscosity=1
          max_normal_force=100000 friction_elasticity=20000 friction_viscosity=282.8427 settle_velocity=0.1
          initial_mu_static=0.9 initial_mu_kinetic=0.6
      Station: leftThigh (0 0.19 0)
    ExponentialContactForce left_hip_medial_contact:
      Parameters contact_parameters: exponential_shape_parameters=(0.0065905 0.5336 1150) normal_viscosity=1
          max_normal_force=100000 friction_elasticity=20000 friction_viscosity=282.8427 settle_velocity=0.1
          initial_mu_static=0.9 initial_mu_kinetic=0.6
      Station: leftThigh (0 0.17 0.02)
    ExponentialContactForce left_hip_lateral_contact:
      Parameters contact_parameters: exponential_shape_parameters=(0.0065905 0.5336 1150) normal_viscosity=1
          max_normal_force=100000 friction_elasticity=20000 friction_viscosity=282.8427 settle_velocity=0.1
          initial_mu_static=0.9 initial_mu_kinetic=0.6
      Station: leftThigh (0 0.17 -0.02)
    ExponentialContactForce right_hip_front_contact:
      Parameters contact_parameters: exponential_shape_parameters=(0.0065905 0.5336 1150) normal_viscosity=1
          max_normal_force=100000 friction_elasticity=20000 friction_viscosity=282.8427 settle_velocity=0.1
          initial_mu_static=0.9 initial_mu_kinetic=0.6
      Station: rightThigh (0 0.15 0)
    ExponentialContactForce right_hip_back_contact:
      Parameters contact_parameters: exponential_shape_parameters=(0.0065905 0.5336 1150) normal_viscosity=1
          max_normal_force=100000 friction_elasticity=20000 friction_viscosity=282.8427 settle_velocity=0.1
          initial_mu_static=0.9 initial_mu_kinetic=0.6
      Station: rightThigh (0 0.19 0)
    ExponentialContactForce right_hip_medial_contact:
      Parameters contact_parameters: exponential_shape_parameters=(0.0065905 0.5336 1150) normal_viscosity=1
          max_normal_force=100000 friction_elasticity=20000 friction_viscosity=282.8427 settle_velocity=0.1
          initial_mu_static=0.9 initial_mu_kinetic=0.6
      Station: rightThigh (0 0.17 -0.02)
    ExponentialContactForce right_hip_lateral_contact:
      Parameters contact_parameters: exponential_shape_parameters=(0.0065905 0.5336 1150) normal_viscosity=1
          max_normal_force=100000 friction_elasticity=20000 friction_viscosity=282.8427 settle_velocity=0.1
          initial_mu_static=0.9 initial_mu_kinetic=0.6
      Station: rightThigh (0 0.17 0.02)
    ExponentialContactForce left_knee_front_contact:
      Parameters contact_parameters: exponential_shape_parameters=(0.0065905 0.5336 1150) normal_viscosity=1
          max_normal_force=100000 friction_elasticity=20000 friction_viscosity=282.8427 settle_velocity=0.1
          initial_mu_static=0.9 initial_mu_kinetic=0.6
      Station: leftShank (0 0.15 0)
    ExponentialContactForce left_knee_back_contact:
      Parameters contact_parameters: exponential_shape_parameters=(0.0065905 0.5336 1150) normal_viscosity=1
          max_normal_force=100000 friction_elasticity=20000 friction_viscosity=282.8427 settle_velocity=0.1
          initial_mu_static=0.9 initial_mu_kinetic=0.6
      Station: leftShank (0 0.22 0)
    ExponentialContactForce left_knee_medial_contact:
      Parameters contact_parameters: exponential_shape_parameters=(0.0065905 0.5336 1150) normal_viscosity=1
          max_normal_force=100000 friction_elasticity=20000 friction_viscosity=282.8427 settle_velocity=0.1
          initial_mu_static=0.9 initial_mu_kinetic=0.6
      Station: leftShank (0 0.1867 0.015)
    ExponentialContactForce left_knee_lateral_contact:
      Parameters contact_parameters: exponential_shape_parameters=(0.0065905 0.5336 1150) normal_viscosity=1
          max_normal_force=100000 friction_elasticity=20000 friction_viscosity=282.8427 settle_velocity=0.1
          initial_mu_static=0.9 initial_mu_kinetic=0.6
      Station: leftShank (0 0.1867 -0.015)
    ExponentialContactForce right_knee_front_contact:
      Parameters contact_parameters: exponential_shape_parameters=(0.0065905 0.5336 1150) normal_viscosity=1
          max_normal_force=100000 friction_elasticity=20000 friction_viscosity=282.8427 settle_velocity=0.1
          initial_mu_static=0.9 initial_mu_kinetic=0.6
      Station: rightShank (0 0.15 0)
    ExponentialContactForce right_knee_back_contact:
      Parameters contact_parameters: exponential_shape_parameters=(0.0065905 0.5336 1150) normal_viscosity=1
          max_normal_force=100000 friction_elasticity=20000 friction_viscosity=282.8427 settle_velocity=0.1
          initial_mu_static=0.9 initial_mu_kinetic=0.6
      Station: rightShank (0 0.22 0)
    ExponentialContactForce right_knee_medial_contact:
      Parameters contact_parameters: exponential_shape_parameters=(0.0065905 0.5336 1150) normal_viscosity=1
          max_normal_force=100000 friction_elasticity=20000 friction_viscosity=282.8427 settle_velocity=0.1
          initial_mu_static=0.9 initial_mu_kinetic=0.6
      Station: rightShank (0 0.1867 -0.015)
    ExponentialContactForce right_knee_lateral_contact:
      Parameters contact_parameters: exponential_shape_parameters=(0.0065905 0.5336 1150) normal_viscosity=1
          max_normal_force=100000 friction_elasticity=20000 friction_viscosity=282.8427 settle_velocity=0.1
          initial_mu_static=0.9 initial_mu_kinetic=0.6
      Station: rightShank (0 0.1867 0.015)
    ExponentialContactForce left_ankle_front_contact:
      Parameters contact_parameters: exponential_shape_parameters=(0.0065905 0.5336 1150) normal_viscosity=1
          max_normal_force=100000 friction_elasticity=20000 friction_viscosity=282.8427 settle_velocity=0.1
          initial_mu_static=0.9 initial_mu_kinetic=0.6
      Station: leftFoot (-0.03 0.012 0.008)
    ExponentialContactForce left_ankle_back_contact:
      Parameters contact_parameters: exponential_shape_parameters=(0.0065905 0.5336 1150) normal_viscosity=1
          max_normal_force=100000 friction_elasticity=20000 friction_viscosity=282.8427 settle_velocity=0.1
          initial_mu_static=0.9 initial_mu_kinetic=0.6
      Station: leftFoot (-0.07 0.012 0.008)
    ExponentialContactForce left_ankle_medial_contact:
      Parameters contact_parameters: exponential_shape_parameters=(0.0065905 0.5336 1150) normal_viscosity=1
          max_normal_force=100000 friction_elasticity=20000 friction_viscosity=282.8427 settle_velocity=0.1
          initial_mu_static=0.9 initial_mu_kinetic=0.6
      Station: leftFoot (-0.05123 0.012 0.013)
    ExponentialContactForce left_ankle_lateral_contact:
      Parameters contact_parameters: exponential_shape_parameters=(0.0065905 0.5336 1150) normal_viscosity=1
          max_normal_force=100000 friction_elasticity=20000 friction_viscosity=282.8427 settle_velocity=0.1
          initial_mu_static=0.9 initial_mu_kinetic=0.6
      Station: leftFoot (-0.05123 0.012 0.003)
    ExponentialContactForce right_ankle_front_contact:
      Parameters contact_parameters: exponential_shape_parameters=(0.0065905 0.5336 1150) normal_viscosity=1
          max_normal_force=100000 friction_elasticity=20000 friction_viscosity=282.8427 settle_velocity=0.1
          initial_mu_static=0.9 initial_mu_kinetic=0.6
      Station: rightFoot (-0.03 0.012 -0.008)
    ExponentialContactForce right_ankle_back_contact:
      Parameters contact_parameters: exponential_shape_parameters=(0.0065905 0.5336 1150) normal_viscosity=1
          max_normal_force=100000 friction_elasticity=20000 friction_viscosity=282.8427 settle_velocity=0.1
          initial_mu_static=0.9 initial_mu_kinetic=0.6
      Station: rightFoot (-0.07 0.012 -0.008)
    ExponentialContactForce right_ankle_medial_contact:
      Parameters contact_parameters: exponential_shape_parameters=(0.0065905 0.5336 1150) normal_viscosity=1
          max_normal_force=100000 friction_elasticity=20000 friction_viscosity=282.8427 settle_velocity=0.1
          initial_mu_static=0.9 initial_mu_kinetic=0.6
      Station: rightFoot (-0.05123 0.012 -0.013)
    ExponentialContactForce right_ankle_lateral_contact:
      Parameters contact_parameters: exponential_shape_parameters=(0.0065905 0.5336 1150) normal_viscosity=1
          max_normal_force=100000 friction_elasticity=20000 friction_viscosity=282.8427 settle_velocity=0.1
          initial_mu_static=0.9 initial_mu_kinetic=0.6
      Station: rightFoot (-0.05123 0.012 -0.003)
